<Lems>

<!-- Specify which component to run -->
<DefaultRun component="sim1"/>

<!-- Include core NeuroML2 ComponentType definitions -->
<Include file="NeuroML2CoreTypes/Cells.xml"/>
<Include file="NeuroML2CoreTypes/Networks.xml"/>
<Include file="NeuroML2CoreTypes/Simulation.xml"/>

<!-- Include core NeuroML2 ComponentType definitions -->
<Include file="MorrisLecarCompType.nml"/>

<morrisLecarCell id="ml1" C="20" I="18" gL="2" gCa="4" gK="8" VL="-50" VCa="100" VK="-70" V1="0" V2="15" V3="10" V4="10" phi="10"/>

<network id="net1">
    <population id="ml1pop" component="ml1" size="1"/>
</network>

<!-- End of NeuroML2 content -->

<Simulation id="sim1" length="220s" step="0.05s" target="net1">

    <Display id="d1" title="Attempts to recreate Fig4 from Morris and Lecar 1981" timeScale="1s">
        <Line id ="fn1" quantity="ml1pop[0]/V" scale="1"  color="#ee40FF" save="V.dat"/>
    </Display>
    <Display id="d1" title="Attempts to recreate Fig4 from Morris and Lecar 1981 - N value" timeScale="1s">
        <Line id ="fn1" quantity="ml1pop[0]/x" scale="1"  color="#FFFFFF" save="N.dat"/>
    </Display>

</Simulation>

</Lems>
